# Units, atoms, boundary condition
units lj
atom_style full
boundary p p p

# r_ref = 7.11 A°, T_ref = 300K -> e_ref = 4.14e-21

# Bead Interaction
pair_style hybrid/overlay dpd 1.0 1.0 123 coul/slater/cut 1.185307217552 2.0
bond_style harmonic
angle_style cosine/squared
#kspace_style pppm 1.0e-2

# Load data, allow velocity communication (needed for dpd)
read_data /home/gabriel/Dokumente/bachelor_thesis/dpd_simulation/lipid_self_assembly/setup/lammps.data

# k_gro in kJ/(mol*nm^2) -> k_red = k_gro*1000*N_A*r_ref^2/e_ref
# k_gro in kJ/(mol*rad^2) -> k_red = k_gro*1000*N_A/e_ref and *2 beacuse cosine/squared definition

include pair.settings
comm_modify vel yes

# Naming, Build neighbors every step if something has changed
include group.settings
neigh_modify delay 0 check yes

# Show values every 500, warn if atom is lost (moves more than a box length)
thermo 2000
thermo_modify lost warn flush yes

# Set veloceties and timestep
velocity all create 1.0 123 dist gaussian
timestep 0.01


# ====================================
# Step 1: relax in npt (T=1 300K, P=0.00868 1bar)
# ====================================
fix 1 all npt temp 1.0 1.0 0.5 iso 0.00868 0.00868 0.5
dump traj_npt all custom 10 trajectories_npt.lammpstrj id mol type x y z
dump_modify traj_npt sort id

run 100000

unfix 1
undump traj_npt
reset_timestep 0

# =============================================
# Step 3: run nvt (T=1.5 450K) in equilibriated box
# =============================================
fix 2 all nvt temp 1.0 1.5 0.5
dump traj_nvt all custom 10 trajectories_nvt.lammpstrj id mol type x y z
dump_modify traj_nvt sort id

run 100000

unfix 2
undump traj_nvt
reset_timestep 0

# ============
# Save state
# ============
write_restart equilibriation.state
write_data equilibriated.data
